*Heading
** Job name: Analysis Model name: Model-1
** Generated by: Abaqus/CAE 6.14-2
*Preprint, echo=NO, model=NO, history=NO, contact=NO
**
** PARTS
**
*Part, name=wing_structure
*Node
      1,  0.800000012, 0.00788810197, 0.0199999996
      2,  0.800000012, 0.00788810197,           0.
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*Element, type=S4R
1,   1,   2, 147, 154
2, 154, 147, 148, 153
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*Nset, nset=Set-OML
   1,   2,   3,   4,   5,   6
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*Elset, elset=Set-OML
   1,   2,   3,   4,   5,   6
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*Nset, nset=Set-Venation-Structure
  19,  20,  39,  40,  41,  42
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*Elset, elset=Set-Venation-Structure
 110, 111, 112, 113, 114, 115
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*Nset, nset=Set-Spars
  17,  18,  37,  38,  47,  48
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*Elset, elset=Set-Spars
 152, 153, 154, 155, 182, 183, 184, 185
*Nset, nset=Set-SMA
   1,   2,   3,   4,   5,   6
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*Elset, elset=Set-SMA
  1,  2,  3,  4,  5,  6
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*Nset, nset=Set-OML-Aluminum
   1,   2,   3,   4,   5,   6
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*Elset, elset=Set-OML-Aluminum
  15,  16,  17,  18,  19,  20
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*Elset, elset=_Surf-OML_SNEG, internal
   1,   2,   3,   4,   5,   6
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*Surface, type=ELEMENT, name=Surf-OML
_Surf-OML_SNEG, SNEG
** Section: Section-SMA
*Shell Section, elset=Set-SMA, material=SMA
0.002, 5
** Region: (Section-AL-2024:Set-OML-Aluminum)
*Elset, elset=_I2, internal
  15,  16,  17,  18,  19,  20
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** Section: Section-AL-2024
*Shell Section, elset=_I2, material=AL-2024
0.002, 5
** Section: Section-AL-6061
*Shell Section, elset=Set-Venation-Structure, material=AL-6061
0.002, 5
** Section: Section-AL-6061
*Shell Section, elset=Set-Spars, material=AL-6061
0.002, 5
*End Part
**
**
** ASSEMBLY
**
*Assembly, name=Assembly
**
*Instance, name=wing_structure-1, part=wing_structure
*End Instance
**
*Nset, nset=Set-OML, instance=wing_structure-1
   1,   2,   3,   4,   5,   6
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*Elset, elset=Set-OML, instance=wing_structure-1
   1,   2,   3,   4,   5,   6
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*Nset, nset=Set-Venation-Structure, instance=wing_structure-1
  19,  20,  39,  40,  41,  42
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*Elset, elset=Set-Venation-Structure, instance=wing_structure-1
 110, 111, 112, 113, 114, 115
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*Nset, nset=TIPNODE, instance=wing_structure-1
 46,
*End Assembly
**
** MATERIALS
**
*Material, name=AL-2024
*Density
2768.,
*Elastic
 7.2395e+10, 0.33
*Material, name=AL-6061
*Density
2768.,
*Elastic
 7.2395e+10, 0.33
*Material, name=SMA
*Density
6450.,
*Elastic
 4e+10, 0.3
** ----------------------------------------------------------------
**
** STEP: Aerodynamic loading
**
*Step, name="Aerodynamic loading", nlgeom=YES
*Static
1., 1., 1e-05, 1.
**
** BOUNDARY CONDITIONS
**
** Name: BC-Encastre Type: Symmetry/Antisymmetry/Encastre
*Boundary
wing_structure-1.Set-Spars, ENCASTRE
**
** LOADS
**
** Name: Pressure   Type: Pressure Using Field: Distribution
*Dload
wing_structure-1.1, P, 45.0481
wing_structure-1.2, P, 45.1925
wing_structure-1.3, P, 45.191
wing_structure-1.4, P, 45.2596
wing_structure-1.5, P, 45.1198
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wing_structure-1.125, P, 2.03696
**
** OUTPUT REQUESTS
**
*Restart, write, frequency=0
**
** FIELD OUTPUT: F-Output-1
**
*Output, field, variable=PRESELECT
**
** HISTORY OUTPUT: H-Output-1
**
*Output, history, variable=PRESELECT
*End Step
** ----------------------------------------------------------------
**
** STEP: Morphing displacement
**
*Step, name="Morphing displacement", nlgeom=YES
*Static
1., 1., 1e-05, 1.
**
** BOUNDARY CONDITIONS
**
** Name: BC-Encastre Type: Symmetry/Antisymmetry/Encastre
*Boundary, op=NEW
** Name: Displacement Type: Displacement/Rotation
*Boundary, op=NEW
wing_structure-1.Set-OML, 2, 2, 10.
**
** LOADS
**
** Name: Pressure   Type: Pressure Using Field: Distribution
*Dload, op=NEW
**
** OUTPUT REQUESTS
**
*Restart, write, frequency=0
**
** FIELD OUTPUT: F-Output-1
**
*Output, field, variable=PRESELECT
**
** HISTORY OUTPUT: H-Output-1
**
*Output, history, variable=PRESELECT
*End Step
