*Heading
** Job name: Job-1 Model name: Model-1
** Generated by: Abaqus/CAE 6.14-2
*Preprint, echo=NO, model=NO, history=NO, contact=NO
**
** PARTS
**
*Part, name=wing_structure
*Node
      1,  0.800000012, 0.00788810197,           0.
      2,  0.800000012, 0.00788810197,  0.100000001
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*Element, type=S4R
 1,   1, 557, 574,   4
 2, 557, 558, 573, 574
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*Nset, nset=Set-Venation-Structure
    3,    4,   19,   20,   21,   22
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*Elset, elset=Set-Venation-Structure
 2071, 2072, 2073, 2074, 2075, 2076
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*Nset, nset=Set-SMA
    3,    4,    5,    6,    7,    8
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*Elset, elset=Set-SMA
   11,   12,   13,   14,   15,   16
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*Nset, nset=Set-OML-Aluminum
    1,    2,    5,    6,    7,    8
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*Elset, elset=Set-OML-Aluminum
  321,  322,  323,  324,  325,  326
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*Elset, elset=_Surf-OML_SNEG, internal
   11,   12,   13,   14,   15,   16
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*Surface, type=ELEMENT, name=Surf-OML
_Surf-OML_SNEG, SNEG
** Section: Section-SMA
*Shell Section, elset=Set-SMA, material=SMA
0.002, 5
** Region: (Section-AL-2024:Set-OML-Aluminum)
*Elset, elset=_I3, internal
  321,  322,  323,  324,  325,  326
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** Section: Section-AL-2024
*Shell Section, elset=_I3, material=AL-2024
0.002, 5
** Section: Section-AL-6061
*Shell Section, elset=Set-Venation-Structure, material=AL-6061
0.002, 5
*End Part
**
**
** ASSEMBLY
**
*Assembly, name=Assembly
**
*Instance, name=wing_structure-1, part=wing_structure
*End Instance
**
*End Assembly
**
** MATERIALS
**
*Material, name=AL-2024
*Density
2768.,
*Elastic
 7.2395e+10, 0.33
*Material, name=AL-6061
*Density
2768.,
*Elastic
 7.2395e+10, 0.33
*Material, name=SMA
*Density
6450.,
*Elastic
 4e+10, 0.3
** ----------------------------------------------------------------
**
** STEP: Analysis
**
*Step, name=Analysis, nlgeom=YES
*Static
0.1, 1., 1e-05, 1.
**
** OUTPUT REQUESTS
**
*Restart, write, frequency=0
**
** FIELD OUTPUT: F-Output-1
**
*Output, field, variable=PRESELECT
**
** HISTORY OUTPUT: H-Output-1
**
*Output, history, variable=PRESELECT
*End Step
